*Heading
** Job name: OHTIM7-Mesh2 Model name: Model-1
** Generated by: Abaqus/CAE 2016
*Preprint, echo=NO, model=NO, history=NO, contact=NO
**
** PARTS
**
*Part, name=OHT
*End Part
**
**
** ASSEMBLY
**
*Assembly, name=Assembly
**
*Instance, name=OHT-1, part=OHT
*Node
      1,   3.17499995,           0.,           0.
      2,   19.0499992,           0.,           0.
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*Element, type=C3D8R
   1, 1407, 1408, 6973, 6963,   46,   47,  928,  927
   2, 1408, 1409, 6974, 6973,   47,   48,  929,  928
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*Nset, nset=Set-1, generate
    1,  9714,     1
*Elset, elset=Set-1, generate
    1,  6208,     1
*Orientation, name=Ori-1
1., 0., 0., 0., 1., 0.
1, 0.
** Section: Section-1
*Solid Section, elset=Set-1, orientation=Ori-1, controls=EC-1, material=IM7
,
*End Instance
**
*Nset, nset=Set-35, instance=OHT-1
   23,   24,   25,   26,   35,   36
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*Elset, elset=Set-35, instance=OHT-1
 3083, 3084, 3085, 3086, 3087, 3088
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*Nset, nset=Set-36, instance=OHT-1
   11,   12,   13,   14,   29,   30
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*Elset, elset=Set-36, instance=OHT-1
 1003, 1028, 1053, 1078, 1103, 1128
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*Nset, nset=U1, instance=OHT-1
 29,
*End Assembly
**
** ELEMENT CONTROLS
**
*Section Controls, name=EC-1, ELEMENT DELETION=YES
1., 1., 1.
**
** MATERIALS
**
*Material, name=IM7
*Depvar, delete=13
     13,
*User Material, constants=37
164.,     8.98,     8.98,     0.32,     0.32,    0.496,     5.02,     5.02
       3.,      2.9,     1.68,      0.1,    0.247,      0.1,    0.247,     0.08
     0.08,     0.08,    0.017,     0.01,   0.0111,   0.0275,   0.0111,   0.0275
   0.0159,   0.0159,   0.0267, 0.081534, 0.024533, 0.000256,  0.00156, 0.000256
  0.00156,      0.1,       2.,       0.,       0.
*Material, name=Material-2
*Elastic, type=ENGINEERING CONSTANTS
164.,  8.98,  8.98,  0.32,  0.32, 0.496,  5.02,  5.02
    3.,
**
** BOUNDARY CONDITIONS
**
** Name: BC-1 Type: Symmetry/Antisymmetry/Encastre
*Boundary
Set-35, ENCASTRE
** ----------------------------------------------------------------
**
** STEP: Step-1
**
*Step, name=Step-1, nlgeom=NO, extrapolation=NO, inc=10000
*Static
0.01, 1., 1e-09, 0.1
**
** BOUNDARY CONDITIONS
**
** Name: BC-2 Type: Displacement/Rotation
*Boundary
Set-36, 1, 1, 1.4
**
** OUTPUT REQUESTS
**
*Restart, write, frequency=0
**
** FIELD OUTPUT: F-Output-1
**
*Output, field
*Node Output
CF, RF, U
*Element Output, directions=YES
LE, PE, PEEQ, PEMAG, S, SDV, STATUS
*Contact Output
CDISP, CSTRESS
**
** HISTORY OUTPUT: H-Output-1
**
*Output, history
*Node Output, nset=Set-35
RF1,
**
** HISTORY OUTPUT: H-Output-2
**
*Node Output, nset=U1
U1,
*End Step
