*Heading
** Job name: TensilePlate Model name: Model-1
** Generated by: Abaqus/CAE 2016
*Preprint, echo=NO, model=NO, history=NO, contact=NO
**
** PARTS
**
*Part, name="Tensile Copuon"
*End Part
**
**
** ASSEMBLY
**
*Assembly, name=Assembly
**
*Instance, name="Tensile Copuon-1", part="Tensile Copuon"
*Node
      1,  -4.49012804,  -4.49012804,   3.80999994
      2,   -6.3499999,           0.,   3.80999994
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*Element, type=C3D8R
  1,  767,  768, 2988, 2980,    1,   39,  648,  647
  2,  768,  769, 2989, 2988,   39,   40,  649,  648
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*Nset, nset=Set-34, generate
    1,  3978,     1
*Elset, elset=Set-34, generate
    1,  2442,     1
*Orientation, name=Ori-2
1., 0., 0., 0., 1., 0.
1, 0.
** Section: Section-1
*Solid Section, elset=Set-34, orientation=Ori-2, controls=EC-1, material="T300/5208 Graphite/epoxy (UMAT)"
,
*Hourglass Stiffness
5., , 0., 0.
*End Instance
**
*Nset, nset=RF1, instance="Tensile Copuon-1"
   27,   28,   29,   30,   35,   37
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*Elset, elset=RF1, instance="Tensile Copuon-1"
  879,  901,  923,  945,  967,  989
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*Nset, nset=Set-3, instance="Tensile Copuon-1"
   27,   28,   29,   30,   35,   37
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*Elset, elset=Set-3, instance="Tensile Copuon-1"
  879,  901,  923,  945,  967,  989
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*Nset, nset=Set-4, instance="Tensile Copuon-1"
   23,   24,   25,   26,   33,   34
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*Elset, elset=Set-4, instance="Tensile Copuon-1"
  527,  549,  571,  593,  615,  637
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*Nset, nset=U1, instance="Tensile Copuon-1"
 25,
*End Assembly
**
** ELEMENT CONTROLS
**
*Section Controls, name=EC-1, ELEMENT DELETION=YES,hourglass=STIFFNESS
1., 1., 1.
*Amplitude, name=Amp-1, definition=EQUALLY SPACED, fixed interval=1.
             0.,              1.
**
** MATERIALS
**
*Material, name="T300/5208 Graphite/epoxy (Standard)"
*Elastic, type=ENGINEERING CONSTANTS
 117.212, 9.653, 9.653,  0.34,  0.34,  0.34, 3.103, 3.103
 3.103,
*Material, name="T300/5208 Graphite/epoxy (UMAT)"
*Depvar
     13,
*User Material, constants=23
 117.212,    9.653,    9.653,     0.34,     0.34,     0.34,    3.103,    3.103
    3.103,  1.37896,  0.68948, 0.103422, 0.206844, 0.103422, 0.206844, 0.103422
 0.103422, 0.103422,       0.5,       0.5,       0.5,       0.5,       0.5
** ----------------------------------------------------------------
**
** STEP: Step-1
**
*Step, name=Step-1, nlgeom=NO, extrapolation=NO, inc=100000
*Static
0.01, 1., 1e-20, 0.01
**
** BOUNDARY CONDITIONS
**
** Name: Calmped Edge Type: Symmetry/Antisymmetry/Encastre
*Boundary
Set-3, ENCASTRE
** Name: Displacement-X Type: Displacement/Rotation
*Boundary
Set-4, 1, 1, 5.
**
** OUTPUT REQUESTS
**
*Restart, write, frequency=0
**
** FIELD OUTPUT: F-Output-1
**
*Output, field
*Node Output
CF, RF, U
*Element Output, directions=YES
LE, PE, PEEQ, PEMAG, S, SDV, STATUS
*Contact Output
CDISP, CSTRESS
**
** HISTORY OUTPUT: H-Output-1
**
*Output, history
*Node Output, nset=RF1
RF1,
**
** HISTORY OUTPUT: H-Output-2
**
*Node Output, nset=U1
U1,
*End Step
